*HEADING
cubit(/home/wzhenlin/workspace/cubitMesh/1cubicParticle_20.inp): 04/09/2017: 18:
version: 13.2
**
********************************** P A R T S **********************************
*PART, NAME=Part-Default
**
********************************** N O D E S **********************************
*NODE, NSET=ALLNODES
       1,    2.500000e-01,    2.500000e+00,    2.500000e-01
       2,    7.500000e-01,    2.500000e+00,    2.500000e-01
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**
********************************** E L E M E N T S ****************************
*ELEMENT, TYPE=C3D8R, ELSET=EB21
    3121,    4132,    4103,    4266,    4265,    5408,    5237,    5826,    5825
    3122,    4131,    4132,    4265,    4267,    5407,    5408,    5825,    5827
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*ELEMENT, TYPE=C3D8R, ELSET=EB22
   10681,   11603,   11602,   13730,   13729,   14068,   14059,   14890,   14889
   10682,   11604,   11603,   13729,   13731,   14077,   14068,   14889,   14891
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*ELEMENT, TYPE=C3D8R, ELSET=EB4
   15001,   10323,   10344,   10362,   10333,   10324,   18361,   18523,   10334
   15002,   10344,   10345,   10361,   10362,   18361,   18362,   18524,   18523
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*ELEMENT, TYPE=C3D8R, ELSET=EB5
    4993,    7225,    7352,    9257,    9258,    6449,    6451,    6761,    6762
    4994,    7352,    7353,    9259,    9257,    6451,    6452,    6763,    6761
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*ELEMENT, TYPE=C3D8R, ELSET=EB8
    7489,    7210,    7201,   10090,   10089,   10382,   10353,   10402,   10401
    7490,    7209,    7210,   10089,   10091,   10381,   10382,   10401,   10403
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*ELEMENT, TYPE=C3D8R, ELSET=EB9
    4681,    6461,    6462,    6657,    6658,    5219,    5319,    6345,    6346
    4682,    6462,    6463,    6659,    6657,    5319,    5320,    6347,    6345
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*ELEMENT, TYPE=C3D8R, ELSET=EB10
   12121,   16199,   16218,   17569,   17570,   14039,   14038,   15249,   15250
   12122,   16218,   16237,   17571,   17569,   14038,   14037,   15251,   15249
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*ELEMENT, TYPE=C3D8R, ELSET=EB11
   17001,    4083,    4104,    4122,    4093,    4084,   20062,   20224,    4094
   17002,    4104,    4105,    4121,    4122,   20062,   20063,   20225,   20224
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*ELEMENT, TYPE=C3D8R, ELSET=EB12
     313,     985,    1112,    3017,    3018,     209,     211,     521,     522
     314,    1112,    1113,    3019,    3017,     211,     212,     523,     521
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*ELEMENT, TYPE=C3D8R, ELSET=EB13
    2809,     970,     961,    3850,    3849,    4142,    4113,    4162,    4161
    2810,     969,     970,    3849,    3851,    4141,    4142,    4161,    4163
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*ELEMENT, TYPE=C3D8R, ELSET=EB14
       1,     221,     222,     417,     418,       1,       3,     106,     105
       2,     222,     223,     419,     417,       3,       4,     107,     106
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*ELEMENT, TYPE=C3D8R, ELSET=EB15
    7801,   11639,   11658,   13009,   13010,   10648,   10647,   10691,   10690
    7802,   11658,   11677,   13011,   13009,   10647,   10646,   10692,   10691
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*ELEMENT, TYPE=C3D8R, ELSET=EB18
   19001,    5119,    5137,    5328,    5327,    5128,    5146,   21763,   18450
   19002,    5137,    5136,    5337,    5328,    5146,    5155,   21764,   21763
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**
********************************** P R O P E R T I E S ************************
*SOLID SECTION, ELSET=EB21, MATERIAL=Default-Steel
*SOLID SECTION, ELSET=EB22, MATERIAL=Default-Steel
*SOLID SECTION, ELSET=EB4, MATERIAL=Default-Steel
*SOLID SECTION, ELSET=EB5, MATERIAL=Default-Steel
*SOLID SECTION, ELSET=EB8, MATERIAL=Default-Steel
*SOLID SECTION, ELSET=EB9, MATERIAL=Default-Steel
*SOLID SECTION, ELSET=EB10, MATERIAL=Default-Steel
*SOLID SECTION, ELSET=EB11, MATERIAL=Default-Steel
*SOLID SECTION, ELSET=EB12, MATERIAL=Default-Steel
*SOLID SECTION, ELSET=EB13, MATERIAL=Default-Steel
*SOLID SECTION, ELSET=EB14, MATERIAL=Default-Steel
*SOLID SECTION, ELSET=EB15, MATERIAL=Default-Steel
*SOLID SECTION, ELSET=EB18, MATERIAL=Default-Steel
**
*END PART
**
**
**
********************************** E N D   P A R T S **********************************
**
**
********************************** A S S E M B L Y ************************************
**
*ASSEMBLY, NAME=ASSEMBLY1
**
*INSTANCE, NAME=Part-Default_1, PART=Part-Default
*END INSTANCE
**
*END ASSEMBLY
**
**
**
*MATERIAL, NAME = Default-Steel
*ELASTIC, TYPE=ISOTROPIC
2.068000e+05, 2.900000e-01
*DENSITY
7.000000e-06
*CONDUCTIVITY,TYPE=ISO
4.500000e-02
*SPECIFIC HEAT
5.000000e+02
**
**
************************************** H I S T O R Y *************************************
**
*PREPRINT
**
**************************************** S T E P 1 ***************************************
*STEP,INC=100,NAME=Default Set
**
*STATIC
1, 1, 1e-05, 1
**
**
**
**
*END STEP
