*HEADING
cubit(/home/wzhenlin/workspace/cubitMesh/2D/studyR/R9.inp): 02/05/2018: 17:24:24
version: 13.2
**
********************************** P A R T S **********************************
*PART, NAME=Part-Default
**
********************************** N O D E S **********************************
*NODE, NSET=ALLNODES
       1,    4.974937e+00,    2.350000e+01,    0.000000e+00
       2,    6.224950e+00,    2.250000e+01,    0.000000e+00
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**
********************************** E L E M E N T S ****************************
*ELEMENT, TYPE=S4R, ELSET=EB128
    3956,    4176,    2247,    2246,    4175
    3957,    4177,    2146,    2247,    4176
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*ELEMENT, TYPE=S4R, ELSET=EB129
    3984,    2291,    4162,    4190,    2297
    3985,    4162,    4163,    4191,    4190
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*ELEMENT, TYPE=S4R, ELSET=EB6
       1,      31,      30,       1,       3
       2,      32,      29,      30,      31
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*ELEMENT, TYPE=S4R, ELSET=EB7
      41,      87,      66,      65,      68
      42,      88,      58,      66,      87
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*ELEMENT, TYPE=S4R, ELSET=EB9
      79,     131,     112,       1,      30
      80,     132,     111,     112,     131
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*ELEMENT, TYPE=S4R, ELSET=EB10
     117,     175,      68,      65,     174
     118,     176,      69,      68,     175
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*ELEMENT, TYPE=S4R, ELSET=EB11
     157,      11,      12,     269,     268
     158,      12,      13,     270,     269
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*ELEMENT, TYPE=S4R, ELSET=EB12
     525,     624,     623,     599,     601
     526,     625,     622,     623,     624
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*ELEMENT, TYPE=S4R, ELSET=EB14
     565,     675,     658,     657,     660
     566,     676,     650,     658,     675
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*ELEMENT, TYPE=S4R, ELSET=EB15
     603,     719,     660,     657,     718
     604,     720,     661,     660,     719
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*ELEMENT, TYPE=S4R, ELSET=EB17
     643,     765,     746,     599,     623
     644,     766,     745,     746,     765
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*ELEMENT, TYPE=S4R, ELSET=EB18
     681,     814,     813,     789,     791
     682,     815,     812,     813,     814
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*ELEMENT, TYPE=S4R, ELSET=EB20
     721,     865,     848,     847,     850
     722,     866,     840,     848,     865
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*ELEMENT, TYPE=S4R, ELSET=EB21
     759,     909,     850,     847,     908
     760,     910,     851,     850,     909
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*ELEMENT, TYPE=S4R, ELSET=EB23
     799,     955,     936,     789,     813
     800,     956,     935,     936,     955
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*ELEMENT, TYPE=S4R, ELSET=EB24
    5854,    1017,    4348,    5884,    5706
    5853,    1016,    5706,    5884,    5708
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*ELEMENT, TYPE=S4R, ELSET=EB26
    6425,    1030,    6259,    6262,    6261
    5356,    1069,    5511,    5515,    5210
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*ELEMENT, TYPE=S4R, ELSET=EB27
    5899,    1107,    5908,    5910,    5907
    6517,    1083,    6310,    6312,    5701
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*ELEMENT, TYPE=S4R, ELSET=EB29
    6475,    1164,    6291,    6292,    6290
    6484,    1164,    6293,    6296,    6291
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*ELEMENT, TYPE=S4R, ELSET=EB45
    7101,    1177,    6624,    6625,    5035
     994,    1173,    1172,    1190,    1189
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*ELEMENT, TYPE=S4R, ELSET=EB47
    7081,    1211,    1173,    6614,    6612
    1018,    1171,    1172,    1210,    1209
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*ELEMENT, TYPE=S4R, ELSET=EB49
    6875,    1241,    1244,    6509,    6507
    1025,    1216,    1215,    1233,    1232
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*ELEMENT, TYPE=S4R, ELSET=EB51
    6861,    1216,    6501,    6502,    1289
    1073,    1214,    1215,    1288,    1287
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*ELEMENT, TYPE=S4R, ELSET=EB53
    7436,    1258,    5724,    6794,    6793
    1049,    1251,    1250,    1268,    1267
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*ELEMENT, TYPE=S4R, ELSET=EB55
    7419,    1294,    1297,    6785,    5281
    1080,    1249,    1250,    1296,    1295
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*ELEMENT, TYPE=S4R, ELSET=EB57
    7497,    1304,    5735,    6825,    6823
    1087,    1302,    1301,    1319,    1318
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*ELEMENT, TYPE=S4R, ELSET=EB59
    7475,    1299,    5768,    6813,    1302
    1159,    1300,    1301,    1409,    1408
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*ELEMENT, TYPE=S4R, ELSET=EB61
    7394,    1339,    5727,    6773,    6771
    1111,    1337,    1336,    1354,    1353
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*ELEMENT, TYPE=S4R, ELSET=EB63
    7366,    1334,    5492,    6758,    1337
    1166,    1335,    1336,    1417,    1416
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*ELEMENT, TYPE=S4R, ELSET=EB65
    7154,    1393,    6648,    6650,    1396
    1135,    1372,    1371,    1389,    1388
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*ELEMENT, TYPE=S4R, ELSET=EB67
    7141,    1419,    1424,    6644,    6223
    1173,    1370,    1371,    1425,    1424
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*ELEMENT, TYPE=S4R, ELSET=EB68
    6227,    1624,    5122,    6132,    6131
    6226,    1612,    6131,    6132,    5626
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*ELEMENT, TYPE=S4R, ELSET=EB70
    6044,    1814,    5775,    6012,    4281
    6024,    1810,    5997,    6001,    5774
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*ELEMENT, TYPE=S4R, ELSET=EB71
    6705,    1852,    6192,    6418,    4826
    6710,    1476,    6419,    6420,    5806
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*ELEMENT, TYPE=S4R, ELSET=EB73
    6743,    1906,    4325,    6440,    6439
    6655,    1895,    4323,    6390,    5435
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*ELEMENT, TYPE=S4R, ELSET=EB74
    6692,    1950,    5953,    6410,    6093
    6686,    1919,    6407,    6409,    6406
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*ELEMENT, TYPE=S4R, ELSET=EB76
    1708,    1981,    1980,    1956,    1958
    1709,    1982,    1979,    1980,    1981
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*ELEMENT, TYPE=S4R, ELSET=EB77
    1748,    2032,    2015,    2014,    2017
    1749,    2033,    2007,    2015,    2032
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*ELEMENT, TYPE=S4R, ELSET=EB79
    1786,    2076,    2057,    1956,    1980
    1787,    2077,    2056,    2057,    2076
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*ELEMENT, TYPE=S4R, ELSET=EB80
    1824,    2120,    2017,    2014,    2119
    1825,    2121,    2018,    2017,    2120
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*ELEMENT, TYPE=S4R, ELSET=EB82
    1864,    2171,    2170,    2146,    2148
    1865,    2172,    2169,    2170,    2171
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*ELEMENT, TYPE=S4R, ELSET=EB83
    1904,    2222,    2205,    2204,    2207
    1905,    2223,    2197,    2205,    2222
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*ELEMENT, TYPE=S4R, ELSET=EB85
    1942,    2266,    2247,    2146,    2170
    1943,    2267,    2246,    2247,    2266
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*ELEMENT, TYPE=S4R, ELSET=EB86
    1980,    2310,    2207,    2204,    2309
    1981,    2311,    2208,    2207,    2310
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*ELEMENT, TYPE=S4R, ELSET=EB87
    2020,    2336,    2338,    2390,    2389
    2021,    2338,    2339,    2391,    2390
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*ELEMENT, TYPE=S4R, ELSET=EB96
    2227,    2590,      66,      58,    2579
    2228,    2591,      65,      66,    2590
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*ELEMENT, TYPE=S4R, ELSET=EB97
    2255,       2,    2566,    2604,       5
    2256,    2566,    2567,    2605,    2604
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*ELEMENT, TYPE=S4R, ELSET=EB98
    2360,    2702,     112,     111,    2701
    2361,    2703,       1,     112,    2702
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*ELEMENT, TYPE=S4R, ELSET=EB99
    2388,     156,    2688,    2730,     162
    2389,    2688,    2689,    2731,    2730
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*ELEMENT, TYPE=S4R, ELSET=EB100
    2493,    2838,     658,     650,    2827
    2494,    2839,     657,     658,    2838
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*ELEMENT, TYPE=S4R, ELSET=EB101
    2521,     600,    2814,    2852,     602
    2522,    2814,    2815,    2853,    2852
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*ELEMENT, TYPE=S4R, ELSET=EB102
    2626,    2950,     746,     745,    2949
    2627,    2951,     599,     746,    2950
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*ELEMENT, TYPE=S4R, ELSET=EB103
    2654,     700,    2936,    2978,     706
    2655,    2936,    2937,    2979,    2978
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*ELEMENT, TYPE=S4R, ELSET=EB104
    2759,    3086,     848,     840,    3075
    2760,    3087,     847,     848,    3086
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*ELEMENT, TYPE=S4R, ELSET=EB105
    2787,     790,    3062,    3100,     792
    2788,    3062,    3063,    3101,    3100
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*ELEMENT, TYPE=S4R, ELSET=EB106
    2892,    3198,     936,     935,    3197
    2893,    3199,     789,     936,    3198
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*ELEMENT, TYPE=S4R, ELSET=EB107
    2920,     890,    3184,    3226,     896
    2921,    3184,    3185,    3227,    3226
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*ELEMENT, TYPE=S4R, ELSET=EB108
    7024,     980,    5661,    6584,    3310
    7023,    3347,    3310,    6584,    6582
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*ELEMENT, TYPE=S4R, ELSET=EB109
    7032,     983,    3362,    6589,    5478
    3054,    3310,    3311,    3349,    3348
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*ELEMENT, TYPE=S4R, ELSET=EB110
    7015,    3446,    6579,    6580,    3445
    7014,    1125,    3445,    6580,    5397
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*ELEMENT, TYPE=S4R, ELSET=EB111
    6995,    1143,    6442,    6571,    6570
    3187,    3432,    3433,    3461,    3460
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*ELEMENT, TYPE=S4R, ELSET=EB118
    7298,    3581,    3544,    6724,    6723
    7300,    1768,    5534,    6725,    6723
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*ELEMENT, TYPE=S4R, ELSET=EB119
    7272,    1462,    6473,    6711,    3654
    3320,    3544,    3545,    3583,    3582
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*ELEMENT, TYPE=S4R, ELSET=EB120
    7307,    1866,    3679,    6728,    6257
    7308,    3680,    6726,    6728,    3679
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*ELEMENT, TYPE=S4R, ELSET=EB121
    7329,    1885,    4392,    6739,    3791
    3453,    3666,    3667,    3709,    3708
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*ELEMENT, TYPE=S4R, ELSET=EB122
    3557,    3816,    2015,    2007,    3805
    3558,    3817,    2014,    2015,    3816
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*ELEMENT, TYPE=S4R, ELSET=EB123
    3585,    1957,    3792,    3830,    1959
    3586,    3792,    3793,    3831,    3830
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*ELEMENT, TYPE=S4R, ELSET=EB124
    3690,    3928,    2057,    2056,    3927
    3691,    3929,    1956,    2057,    3928
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*ELEMENT, TYPE=S4R, ELSET=EB125
    3718,    2101,    3914,    3956,    2107
    3719,    3914,    3915,    3957,    3956
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*ELEMENT, TYPE=S4R, ELSET=EB126
    3823,    4064,    2205,    2197,    4053
    3824,    4065,    2204,    2205,    4064
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*ELEMENT, TYPE=S4R, ELSET=EB127
    3851,    2147,    4040,    4078,    2149
    3852,    4040,    4041,    4079,    4078
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**
********************************** P R O P E R T I E S ************************
*SHELL SECTION, ELSET=EB128, SECTION INTEGRATION=SIMPSON, MATERIAL=Default-Steel
1.000000e+00
*SHELL SECTION, ELSET=EB129, SECTION INTEGRATION=SIMPSON, MATERIAL=Default-Steel
1.000000e+00
*SHELL SECTION, ELSET=EB6, SECTION INTEGRATION=SIMPSON, MATERIAL=Default-Steel
1.000000e+00
*SHELL SECTION, ELSET=EB7, SECTION INTEGRATION=SIMPSON, MATERIAL=Default-Steel
1.000000e+00
*SHELL SECTION, ELSET=EB9, SECTION INTEGRATION=SIMPSON, MATERIAL=Default-Steel
1.000000e+00
*SHELL SECTION, ELSET=EB10, SECTION INTEGRATION=SIMPSON, MATERIAL=Default-Steel
1.000000e+00
*SHELL SECTION, ELSET=EB11, SECTION INTEGRATION=SIMPSON, MATERIAL=Default-Steel
1.000000e+00
*SHELL SECTION, ELSET=EB12, SECTION INTEGRATION=SIMPSON, MATERIAL=Default-Steel
1.000000e+00
*SHELL SECTION, ELSET=EB14, SECTION INTEGRATION=SIMPSON, MATERIAL=Default-Steel
1.000000e+00
*SHELL SECTION, ELSET=EB15, SECTION INTEGRATION=SIMPSON, MATERIAL=Default-Steel
1.000000e+00
*SHELL SECTION, ELSET=EB17, SECTION INTEGRATION=SIMPSON, MATERIAL=Default-Steel
1.000000e+00
*SHELL SECTION, ELSET=EB18, SECTION INTEGRATION=SIMPSON, MATERIAL=Default-Steel
1.000000e+00
*SHELL SECTION, ELSET=EB20, SECTION INTEGRATION=SIMPSON, MATERIAL=Default-Steel
1.000000e+00
*SHELL SECTION, ELSET=EB21, SECTION INTEGRATION=SIMPSON, MATERIAL=Default-Steel
1.000000e+00
*SHELL SECTION, ELSET=EB23, SECTION INTEGRATION=SIMPSON, MATERIAL=Default-Steel
1.000000e+00
*SHELL SECTION, ELSET=EB24, SECTION INTEGRATION=SIMPSON, MATERIAL=Default-Steel
1.000000e+00
*SHELL SECTION, ELSET=EB26, SECTION INTEGRATION=SIMPSON, MATERIAL=Default-Steel
1.000000e+00
*SHELL SECTION, ELSET=EB27, SECTION INTEGRATION=SIMPSON, MATERIAL=Default-Steel
1.000000e+00
*SHELL SECTION, ELSET=EB29, SECTION INTEGRATION=SIMPSON, MATERIAL=Default-Steel
1.000000e+00
*SHELL SECTION, ELSET=EB45, SECTION INTEGRATION=SIMPSON, MATERIAL=Default-Steel
1.000000e+00
*SHELL SECTION, ELSET=EB47, SECTION INTEGRATION=SIMPSON, MATERIAL=Default-Steel
1.000000e+00
*SHELL SECTION, ELSET=EB49, SECTION INTEGRATION=SIMPSON, MATERIAL=Default-Steel
1.000000e+00
*SHELL SECTION, ELSET=EB51, SECTION INTEGRATION=SIMPSON, MATERIAL=Default-Steel
1.000000e+00
*SHELL SECTION, ELSET=EB53, SECTION INTEGRATION=SIMPSON, MATERIAL=Default-Steel
1.000000e+00
*SHELL SECTION, ELSET=EB55, SECTION INTEGRATION=SIMPSON, MATERIAL=Default-Steel
1.000000e+00
*SHELL SECTION, ELSET=EB57, SECTION INTEGRATION=SIMPSON, MATERIAL=Default-Steel
1.000000e+00
*SHELL SECTION, ELSET=EB59, SECTION INTEGRATION=SIMPSON, MATERIAL=Default-Steel
1.000000e+00
*SHELL SECTION, ELSET=EB61, SECTION INTEGRATION=SIMPSON, MATERIAL=Default-Steel
1.000000e+00
*SHELL SECTION, ELSET=EB63, SECTION INTEGRATION=SIMPSON, MATERIAL=Default-Steel
1.000000e+00
*SHELL SECTION, ELSET=EB65, SECTION INTEGRATION=SIMPSON, MATERIAL=Default-Steel
1.000000e+00
*SHELL SECTION, ELSET=EB67, SECTION INTEGRATION=SIMPSON, MATERIAL=Default-Steel
1.000000e+00
*SHELL SECTION, ELSET=EB68, SECTION INTEGRATION=SIMPSON, MATERIAL=Default-Steel
1.000000e+00
*SHELL SECTION, ELSET=EB70, SECTION INTEGRATION=SIMPSON, MATERIAL=Default-Steel
1.000000e+00
*SHELL SECTION, ELSET=EB71, SECTION INTEGRATION=SIMPSON, MATERIAL=Default-Steel
1.000000e+00
*SHELL SECTION, ELSET=EB73, SECTION INTEGRATION=SIMPSON, MATERIAL=Default-Steel
1.000000e+00
*SHELL SECTION, ELSET=EB74, SECTION INTEGRATION=SIMPSON, MATERIAL=Default-Steel
1.000000e+00
*SHELL SECTION, ELSET=EB76, SECTION INTEGRATION=SIMPSON, MATERIAL=Default-Steel
1.000000e+00
*SHELL SECTION, ELSET=EB77, SECTION INTEGRATION=SIMPSON, MATERIAL=Default-Steel
1.000000e+00
*SHELL SECTION, ELSET=EB79, SECTION INTEGRATION=SIMPSON, MATERIAL=Default-Steel
1.000000e+00
*SHELL SECTION, ELSET=EB80, SECTION INTEGRATION=SIMPSON, MATERIAL=Default-Steel
1.000000e+00
*SHELL SECTION, ELSET=EB82, SECTION INTEGRATION=SIMPSON, MATERIAL=Default-Steel
1.000000e+00
*SHELL SECTION, ELSET=EB83, SECTION INTEGRATION=SIMPSON, MATERIAL=Default-Steel
1.000000e+00
*SHELL SECTION, ELSET=EB85, SECTION INTEGRATION=SIMPSON, MATERIAL=Default-Steel
1.000000e+00
*SHELL SECTION, ELSET=EB86, SECTION INTEGRATION=SIMPSON, MATERIAL=Default-Steel
1.000000e+00
*SHELL SECTION, ELSET=EB87, SECTION INTEGRATION=SIMPSON, MATERIAL=Default-Steel
1.000000e+00
*SHELL SECTION, ELSET=EB96, SECTION INTEGRATION=SIMPSON, MATERIAL=Default-Steel
1.000000e+00
*SHELL SECTION, ELSET=EB97, SECTION INTEGRATION=SIMPSON, MATERIAL=Default-Steel
1.000000e+00
*SHELL SECTION, ELSET=EB98, SECTION INTEGRATION=SIMPSON, MATERIAL=Default-Steel
1.000000e+00
*SHELL SECTION, ELSET=EB99, SECTION INTEGRATION=SIMPSON, MATERIAL=Default-Steel
1.000000e+00
*SHELL SECTION, ELSET=EB100, SECTION INTEGRATION=SIMPSON, MATERIAL=Default-Steel
1.000000e+00
*SHELL SECTION, ELSET=EB101, SECTION INTEGRATION=SIMPSON, MATERIAL=Default-Steel
1.000000e+00
*SHELL SECTION, ELSET=EB102, SECTION INTEGRATION=SIMPSON, MATERIAL=Default-Steel
1.000000e+00
*SHELL SECTION, ELSET=EB103, SECTION INTEGRATION=SIMPSON, MATERIAL=Default-Steel
1.000000e+00
*SHELL SECTION, ELSET=EB104, SECTION INTEGRATION=SIMPSON, MATERIAL=Default-Steel
1.000000e+00
*SHELL SECTION, ELSET=EB105, SECTION INTEGRATION=SIMPSON, MATERIAL=Default-Steel
1.000000e+00
*SHELL SECTION, ELSET=EB106, SECTION INTEGRATION=SIMPSON, MATERIAL=Default-Steel
1.000000e+00
*SHELL SECTION, ELSET=EB107, SECTION INTEGRATION=SIMPSON, MATERIAL=Default-Steel
1.000000e+00
*SHELL SECTION, ELSET=EB108, SECTION INTEGRATION=SIMPSON, MATERIAL=Default-Steel
1.000000e+00
*SHELL SECTION, ELSET=EB109, SECTION INTEGRATION=SIMPSON, MATERIAL=Default-Steel
1.000000e+00
*SHELL SECTION, ELSET=EB110, SECTION INTEGRATION=SIMPSON, MATERIAL=Default-Steel
1.000000e+00
*SHELL SECTION, ELSET=EB111, SECTION INTEGRATION=SIMPSON, MATERIAL=Default-Steel
1.000000e+00
*SHELL SECTION, ELSET=EB118, SECTION INTEGRATION=SIMPSON, MATERIAL=Default-Steel
1.000000e+00
*SHELL SECTION, ELSET=EB119, SECTION INTEGRATION=SIMPSON, MATERIAL=Default-Steel
1.000000e+00
*SHELL SECTION, ELSET=EB120, SECTION INTEGRATION=SIMPSON, MATERIAL=Default-Steel
1.000000e+00
*SHELL SECTION, ELSET=EB121, SECTION INTEGRATION=SIMPSON, MATERIAL=Default-Steel
1.000000e+00
*SHELL SECTION, ELSET=EB122, SECTION INTEGRATION=SIMPSON, MATERIAL=Default-Steel
1.000000e+00
*SHELL SECTION, ELSET=EB123, SECTION INTEGRATION=SIMPSON, MATERIAL=Default-Steel
1.000000e+00
*SHELL SECTION, ELSET=EB124, SECTION INTEGRATION=SIMPSON, MATERIAL=Default-Steel
1.000000e+00
*SHELL SECTION, ELSET=EB125, SECTION INTEGRATION=SIMPSON, MATERIAL=Default-Steel
1.000000e+00
*SHELL SECTION, ELSET=EB126, SECTION INTEGRATION=SIMPSON, MATERIAL=Default-Steel
1.000000e+00
*SHELL SECTION, ELSET=EB127, SECTION INTEGRATION=SIMPSON, MATERIAL=Default-Steel
1.000000e+00
**
*END PART
**
**
**
********************************** E N D   P A R T S **********************************
**
**
********************************** A S S E M B L Y ************************************
**
*ASSEMBLY, NAME=ASSEMBLY1
**
*INSTANCE, NAME=Part-Default_1, PART=Part-Default
*END INSTANCE
**
*END ASSEMBLY
**
**
**
*MATERIAL, NAME = Default-Steel
*ELASTIC, TYPE=ISOTROPIC
2.068000e+05, 2.900000e-01
*DENSITY
7.000000e-06
*CONDUCTIVITY,TYPE=ISO
4.500000e-02
*SPECIFIC HEAT
5.000000e+02
**
**
************************************** H I S T O R Y *************************************
**
*PREPRINT
**
**************************************** S T E P 1 ***************************************
*STEP,INC=100,NAME=Default Set
**
*STATIC
1, 1, 1e-05, 1
**
**
**
**
*END STEP
